 <aerodynamics>

  <axis name="YAW">
    <function name="elevon_yaw" frame="BODY" unit="FT*LBS">
      <sum>
      <product>
        <property>fcs/ele_left_lag</property>
        <value> -0.35 </value> <!-- Replace These Values -->
      </product>
      <product>
        <property>fcs/ele_right_lag</property>
        <value> -0.35 </value> <!-- Replace These Values -->
      </product>
      </sum> <!-- Rotor Influences not added here, but in external forces. See 'quadshot.xml' -->
    </function>
  </axis>

  <axis name="PITCH">
    <function name="elevon_pitch" frame="BODY" unit="FT*LBS">
      <sum>
      <product>
        <property>fcs/ele_left_lag</property>
        <value> -0.0417 </value> <!-- Replace These Values -->
      </product>
      <product>
        <property>fcs/ele_right_lag</property>
        <value> 0.0417 </value> <!-- Replace These Values -->
      </product>
      </sum>
    </function>
  </axis>

  <axis name="LIFT">

    <function name="aero/force/Lift_alpha">
      <description>Lift due to alpha</description>
      <product>
          <property>aero/qbar-psf</property>
          <property>metrics/Sw-sqft</property>
          <table>
            <independentVar lookup="row">aero/alpha-rad</independentVar>
            <tableData> <!-- Replace These Values -->
              -1.87 -0.35
              -1.57  0.0
              -1.27  0.65
              -0.80  0.65
               0.00  0.0
               0.80  0.2
               1.27  0.2
               1.57  0.0
               1.87 -0.2
            </tableData>
          </table>
      </product>
    </function>

  </axis>

  <axis name="DRAG">

    <function name="aero/force/Drag_basic">
       <description>Drag at zero lift</description>
       <product>
          <property>aero/qbar-psf</property>
          <property>metrics/Sw-sqft</property>
          <table>
            <independentVar lookup="row">aero/alpha-rad</independentVar>
            <tableData>
             -1.57    0.4
             -1.27    0.6
              0.00    1.500
              1.27    0.6
              1.57    0.4
            </tableData>
          </table>
       </product>
    </function>

    <function name="aero/force/Drag_induced">
       <description>Induced drag</description>
         <product>
           <property>aero/qbar-psf</property>
           <property>metrics/Sw-sqft</property>
           <property>aero/cl-squared</property>
           <value>0.8</value>
         </product>
    </function>

  </axis>

  <axis name="SIDE">

    <!--Destabalizing side force to reduce the sidewards drag a bit-->
    <function name="aero/force/Side_beta">
       <description>Side force due to beta</description>
       <product>
           <property>aero/qbar-psf</property>
           <property>metrics/Sw-sqft</property>
           <property>aero/beta-rad</property>
           <value>0.02</value>
       </product>
    </function>

  </axis>

 </aerodynamics>
